// SBML level 3 version 1

model D4_model_EGFR_v13b()
  // model units - substance: substance, time: time, volume: volume, area: area, length: length, extent: substance

  // Compartments:
  compartment kinetics_464_0_ = 1.09645e-12 volume;

  // Species:
  // Inactive complex of Sos* with Grb2 due to phosphorylation of the Sos. See Porfiri and McCormick 1996 JBC 271(10):5871.
  species Sos_p_dot_Grb2_473_0_ in kinetics_464_0_ = 0; Sos_p_dot_Grb2_473_0_ is "Sos_p.Grb2";
  // There is probably a lot of it in the cell: it is also known as Ash (abundant src homology protein). Also Waters et al JBC 271:30 18224 1996 say that only a small fraction of cellular Grb is precipitated out when SoS is precipitated. As most of the Sos seems to be associated with Grb2, it would seem like there is a lot of the latter. Say 1 uM. This would comfortably saturate the SoS.
  species Grb2_475_0_ in kinetics_464_0_ = 0.001;
  // For simplicity I treat the activation of Sos as involving a single complex comprising Sos, Grb2 and Shc*. This is reasonably documented: Sasaoka et al 1994 JBC 269(51):32621-5 Chook et al JBC 1996 271(48):30472
  species Sos_dot_Grb2_477_0_ in kinetics_464_0_ = 0; Sos_dot_Grb2_477_0_ is "Sos.Grb2";
  // Phosphorylated form of SoS. Nominally this is an inactivation step mediated by MAPK, see Profiri and McCormick 1996 JBC 271(10):5871. I have not put this inactivation in this pathway so this molecule currently only represents a potential interaction point.
  species Sos_p_479_0_ in kinetics_464_0_ = 0;
  // I have tried using low (0.02 uM) initial concs, but these give a very flat response to EGF stim although the overall activation of Ras is not too bad. I am reverting to 0.1 because we expect a sharp initial response, followed by a decline.
  species Sos_481_0_ in kinetics_464_0_ = 0.0001;
  // This three-way complex is one of the main GEFs for activating Ras.
  species Shc_p_dot_Sos_dot_Grb2_483_0_ in kinetics_464_0_ = 0; Shc_p_dot_Sos_dot_Grb2_483_0_ is "Shc_p.Sos.Grb2";
  species Sos_dot_Ras_GEF_cplx_486_0_ in kinetics_464_0_ = 0; Sos_dot_Ras_GEF_cplx_486_0_ is "Sos.Ras_GEF_cplx";
  // Strom et al 1990 Oncogene 5 pp 345-51 report high general expression in all tissues. Huang and Ferrell 1996 PNAS 93(19):10078 use a value of 3 nM for oocytes. Here we stick with a much higher expression based on the Strom report.
  species craf_1_498_0_ in kinetics_464_0_ = 0.0001999939;
  // Conc is from Seger et al JBC 267:20 pp14373 (1992) mwt is 45/46 Kd We assume that phosphorylation on both ser and thr is needed for activiation. See Kyriakis et al Nature 358 417 1992 Init conc of total is 0.18
  species MAPKK_500_0_ in kinetics_464_0_ = 0.0001800052;
  // Mol wt is 42 KDa. conc is from Sanghera et al JBC 265 pp 52 (1990) They estimate MAPK is 1e-4x total protein, and protein is 15% of cell wt, so MAPK is 1.5e-5g/ml = 0.36uM. Lets use this. Note though that Huang and Ferrell 1996 PNAS 93(19):10078 report 1.2 uM in oocytes. Also note that brain concs may be high. Ortiz et al 1995 J. Neurosci 15(2):1285-1297 report 0.3 ng/ug protein in Cingulate Gyrus and 1.2 ng/ug protein in nucleus accumbens. In hippocampus 270 ng/mg protein for ERK1 and 820 ng/mg protein for ERK 2. If 15% of cell weight is protein, that means that about 300 * 0.15 ng/ul is ERK 1. ie, 45e-9g/1e-6 litre = 45 mg/litre or about 1 uM. For non-neuronal tissues a lower value may be better.
  species MAPK_502_0_ in kinetics_464_0_ = 0.0003599951;
  // Haystead et al FEBS Lett. 306(1) pp 17-22 show that phosphorylation is strictly sequential, first tyr185 then thr183.
  species MAPK_tyr_504_0_ in kinetics_464_0_ = 0;
  // MAPKK phosphorylates MAPK on both the tyr and thr residues, first tyr then thr. Refs: Seger et al JBC267:20 pp 14373 1992 The MAPKK itself is phosphorylated on ser as well as thr residues. Let us assume that the ser goes first, and that the sequential phosphorylation is needed. See Kyriakis et al Nature 358 417-421 1992
  species MAPKK_p_506_0_ in kinetics_464_0_ = 0;
  species MAPKKtyr_cplx_509_0_ in kinetics_464_0_ = 0;
  species MAPKKthr_cplx_512_0_ in kinetics_464_0_ = 0;
  // Intermediately phophorylated, assumed inactive, form of MAPKK
  species MAPKK_ser_514_0_ in kinetics_464_0_ = 0;
  // Shorthand name for Raf.GTP.Ras. This refers to the complex between GTP.Ras and the unphosphorylated Raf. I treat this as having the same enzyme activity as the Raf*.GTP.Ras form.
  species RGR_516_0_ in kinetics_464_0_ = 0;
  species RGR_dot_1_cplx_519_0_ in kinetics_464_0_ = 0; RGR_dot_1_cplx_519_0_ is "RGR.1_cplx";
  species RGR_dot_2_cplx_522_0_ in kinetics_464_0_ = 0; RGR_dot_2_cplx_522_0_ is "RGR.2_cplx";
  // MKP2 is modeled to act as a relatively steady, unregulated phosphatase for controlling MAPK activity. From Brondello et al JBC 272(2):1368-1376 (1997), the blockage of MKP-1 induction increases MAPK activity by no more than 2x. So this phosphatase will play the steady role and the fully stimulated MKP-1 can come up to the level of this steady level. From Chu et al 1995 JBC 271(11):6497-6501 it looks like both MKP-1 and MKP-2 have similar activities in dephosphorylating ERK2. So I use the same enzymatic rates for both. 31 Jan 2002: For the purposes of making a bistable model without the complications of MKP-1 induction, I simply set the initial conc of MKP-2 up by 0.0004 uM which was the starting level of MKP-1.
  species MKP_2_524_0_ in kinetics_464_0_ = 2.40017e-6;
  species MKP2_tyr_deph_cplx_527_0_ in kinetics_464_0_ = 0;
  species MKP2_thr_deph_cplx_530_0_ in kinetics_464_0_ = 0;
  // Refs: Pato et al Biochem J 293:35-41(93); CoInit values span a range depending on source. Pato et al 1993 Biochem J 293:35-41 and Cohen et al 1988 Meth Enz 159:390-408 estimate 80 nM from muscle Zolneierowicz et al 1994 Biochem 33:11858-11867 report levels of 0.4 uM again from muscle, but expression is also strong in brain. Our estimate of 0.224 is between these two. There are many substrates for PP2A in this model, so I put the enzyme rate calculations here: Takai_andMieskes Biochem J 275:233-239 have mol wt 36 KDa. They report Vmax of 119 umol/min/mg i.e. 125/sec for k3 for pNPP substrate, Km of 16 mM. This is obviously unreasonable for protein substrates. For chicken gizzard myosin light chan, we have Vmax = 13 umol/min/mg or about k3 = 14/sec. Pato et al 1993 Biochem J 293:35-41 report caldesmon: Km = 2.2 uM, Vmax = 0.24 umol/min/mg. They do not think caldesmon is a good substrate. Calponin: Km = 14.3, Vmax = 5. Our values approximate these.
  species PPhosphatase2A_532_0_ in kinetics_464_0_ = 0.0002239956;
  species MAPKK_deph_cplx_535_0_ in kinetics_464_0_ = 0;
  species MAPKK_deph_ser_cplx_538_0_ in kinetics_464_0_ = 0;
  // This molecule is phosphorylated on both the tyr and thr residues and is active: Seger et al 1992 JBC 267(20):14373 The rate consts are from two sources: Combine Sanghera et al JBC 265(1) :52-57 with Nemenoff et al JBC 93 pp 1960 to get k3 = 10, k2 = 40, k1 = 3.25e-6
  species MAPK_p_540_0_ in kinetics_464_0_ = 0;
  species MAPK_phosph_Sos_cplx_543_0_ in kinetics_464_0_ = 0;
  species MAPK_phosph_SHC_p_Sos_Grb2_cplx_546_0_ in kinetics_464_0_ = 0;
  // Only a very small fraction (7% unstim, 15% stim) of ras is GTP-bound. Gibbs et al JBC 265(33) 20437
  species GTP_Ras_550_0_ in kinetics_464_0_ = 0;
  // GDP bound form. See Rosen et al Neuron 12 1207-1221 June 1994. the activation loop is based on Boguski and McCormick Nature 366 643-654 93 Assume Ras is present at about the same level as craf-1, 0.2 uM. Hallberg et al JBC 269:6 3913-3916 1994 estimate upto 5-10% of cellular Raf is assoc with Ras. Given that only 5-10% of Ras is GTP-bound, we need similar amounts of Ras as Raf.
  species GDP_Ras_552_0_ in kinetics_464_0_ = 0.0001999939;
  // There are 2 isoforms: 52 KDa and 46 KDa (See Okada et al JBC 270:35 pp 20737 1995). They are acted up on by the EGFR in very similar ways, and apparently both bind Grb2 similarly, so we'll bundle them together here. Sasaoka et al JBC 269:51 pp 32621 1994 show immunoprecs where it looks like there is at least as much Shc as Grb2. So we'll tentatively say there is 1 uM of Shc.
  species SHC_562_0_ in kinetics_464_0_ = 0.0005000076;
  // Phosphorylated form of SHC. Binds to the SoS.Grb2 complex to give the activated GEF form upstream of Ras.
  species SHC_p_564_0_ in kinetics_464_0_ = 0;
  // Berkers et al JBC 266 say 22K high affinity receptors per cell. Sherrill and Kyte Biochemistry 35 use range 4-200 nM. These values match reasonably. Heidaran et al 1993 JBC 268(13):9287-9295 use NIH3T3 cells and have 6.5e4 receptors/cell. This is also in the same general range. We use this last value because the cell type matches.
  species EGFR_566_0_ in kinetics_464_0_ = 0.0001083345;
  // The internalized PDGFR is treated as a generic pool in equilibrium with the surface receptor. This simplifies the turnover processes but fits reasonably well with data.
  species Internal_L_EGFR_568_0_ in kinetics_464_0_ = 0;
  // Platelet-derived growth factor. Heterodimer Mol wt. is approx 30 KDa Deuel et al 1985 Cancer Surv. 4(4):633-53 Conc of 50 ng/ml is close to saturating, and is used by P. Ram (personal communication). Other refs use 65 ng/ml Weise RJ et al 1995 JBC 270(7):3442-3446 A stimulus of 5 min is commonly used. Conversion factor: 1ng/ml = (1e-9/30K)* 1000 Moles/litre = 3e-11M = 3e-5 uM So 50 ng/ml ~ 1.5 nM.
  species $EGF_570_0_ in kinetics_464_0_ = 1.999939e-8;
  // This is terribly simplified: there are many interesting intermediate stages, including dimerization and assoc with adapter molecules like Shc, that contribute to the activation of the EGFR.
  species L_EGFR_572_0_ in kinetics_464_0_ = 0;
  species phosph_Shc_cplx_575_0_ in kinetics_464_0_ = 0;

  // Reactions:
  // kinetics_464_0_ * Shc_bind_Sos_dot_Grb2_488_0__Kf * Sos_dot_Grb2_477_0_*SHC_p_564_0_-kinetics_464_0_ * Shc_bind_Sos_dot_Grb2_488_0__Kb * Shc_p_dot_Sos_dot_Grb2_483_0_
  // Sasaoka et al JBC 269:51 pp 32621 1994, table on pg 32623 indicates that this pathway accounts for about 50% of the GEF activation. (88% - 39%). Error is large, about 20%. Fig 1 is most useful in constraining rates. Chook et al JBC 271:48 pp 30472, 1996 say that the Kd is 0.2 uM for Shc binding to EGFR. The Kd for Grb direct binding is 0.7, so we'll ignore it.
  Shc_bind_Sos_dot_Grb2_488_0_: Sos_dot_Grb2_477_0_ + SHC_p_564_0_ -> Shc_p_dot_Sos_dot_Grb2_483_0_; kinetics_464_0_*Shc_bind_Sos_dot_Grb2_488_0__Kf*Sos_dot_Grb2_477_0_*SHC_p_564_0_ - kinetics_464_0_*Shc_bind_Sos_dot_Grb2_488_0__Kb*Shc_p_dot_Sos_dot_Grb2_483_0_; Shc_bind_Sos_dot_Grb2_488_0_ is "Shc_bind_Sos.Grb2";
    Shc_bind_Sos_dot_Grb2_488_0__Kf = 121008.6 litre_per_mmole_per_second; Shc_bind_Sos_dot_Grb2_488_0__Kb = 23.567 per_second;
  // kinetics_464_0_ * Grb2_bind_Sos_p_490_0__Kf * Grb2_475_0_*Sos_p_479_0_-kinetics_464_0_ * Grb2_bind_Sos_p_490_0__Kb * Sos_p_dot_Grb2_473_0_
  // Same rates as Grb2_bind_Sos: Porfiri and McCormick JBC 271:10 pp 5871 1996 show that the binding is not affected by the phosphorylation.
  Grb2_bind_Sos_p_490_0_: Grb2_475_0_ + Sos_p_479_0_ -> Sos_p_dot_Grb2_473_0_; kinetics_464_0_*Grb2_bind_Sos_p_490_0__Kf*Grb2_475_0_*Sos_p_479_0_ - kinetics_464_0_*Grb2_bind_Sos_p_490_0__Kb*Sos_p_dot_Grb2_473_0_;
    Grb2_bind_Sos_p_490_0__Kf = 25.00038 litre_per_mmole_per_second; Grb2_bind_Sos_p_490_0__Kb = 0.0168 per_second;
  // kinetics_464_0_ * dephosph_Sos_492_0__Kf * Sos_p_479_0_
  // The best clue I have to these rates is from the time courses of the EGF activation, which is around 1 to 5 min. The dephosph would be expected to be of the same order, perhaps a bit longer. Lets use 0.002 which is about 8 min. Sep 17: The transient activation curve matches better with kf = 0.001
  dephosph_Sos_492_0_: Sos_p_479_0_ => Sos_481_0_; kinetics_464_0_*dephosph_Sos_492_0__Kf*Sos_p_479_0_;
    dephosph_Sos_492_0__Kf = 0.015377 per_second;
  // kinetics_464_0_ * Grb2_bind_Sos_494_0__Kf * Grb2_475_0_*Sos_481_0_-kinetics_464_0_ * Grb2_bind_Sos_494_0__Kb * Sos_dot_Grb2_477_0_
  // As there are 2 SH3 domains, this reaction could be 2nd order. I have a Kd of 22 uM from peptide binding (Lemmon et al JBC 269:50 pg 31653). However, Chook et al JBC 271:48 pg30472 say it is 0.4uM with purified proteins, so we believe them. They say it is 1:1 binding. Porfiri and McCormick JBC 271 also have related data. After comparing with the time-course of 1 min and the efficacy of activation of Ras, settle on Kd of 0.672 which is close to the Chook et al value.
  Grb2_bind_Sos_494_0_: Grb2_475_0_ + Sos_481_0_ -> Sos_dot_Grb2_477_0_; kinetics_464_0_*Grb2_bind_Sos_494_0__Kf*Grb2_475_0_*Sos_481_0_ - kinetics_464_0_*Grb2_bind_Sos_494_0__Kb*Sos_dot_Grb2_477_0_;
    Grb2_bind_Sos_494_0__Kf = 532.6576 litre_per_mmole_per_second; Grb2_bind_Sos_494_0__Kb = 0.15081 per_second;
  // kinetics_464_0_ * Ras_intrinsic_GTPase_554_0__Kf * GTP_Ras_550_0_
  // This is extremely slow (kf = 1e-4), but it is significant as so little GAP actually gets complexed with it that the total GTP turnover rises only by 2-3 X (see Gibbs et al, JBC 265(33) 20437-20422) and Eccleston et al JBC 268(36) 27012-27019 There is no back reaction as we assume this to be a regular irreversible Michaelis-Menten zeroth order hydrolysis.
  Ras_intrinsic_GTPase_554_0_: GTP_Ras_550_0_ => GDP_Ras_552_0_; kinetics_464_0_*Ras_intrinsic_GTPase_554_0__Kf*GTP_Ras_550_0_;
    Ras_intrinsic_GTPase_554_0__Kf = 0.044145 per_second;
  // kinetics_464_0_ * Ras_act_unphosph_raf_556_0__Kf * craf_1_498_0_*GTP_Ras_550_0_-kinetics_464_0_ * Ras_act_unphosph_raf_556_0__Kb * RGR_516_0_
  // Based on rates of Ras-act-craf which has Kf=60, Kb= 0.5. This reaction was introduced to account for the PKC-independent activation of MAPK. This reac should have less affinity but similar tau as compared to the Ras-cat-craf, since the phosphorylated Raf form has a greater effect on MAPK.
  Ras_act_unphosph_raf_556_0_: craf_1_498_0_ + GTP_Ras_550_0_ -> RGR_516_0_; kinetics_464_0_*Ras_act_unphosph_raf_556_0__Kf*craf_1_498_0_*GTP_Ras_550_0_ - kinetics_464_0_*Ras_act_unphosph_raf_556_0__Kb*RGR_516_0_;
    Ras_act_unphosph_raf_556_0__Kf = 5999.906 litre_per_mmole_per_second; Ras_act_unphosph_raf_556_0__Kb = 1 per_second;
  // kinetics_464_0_ * basal_GEF_558_0__Kf * GDP_Ras_552_0_
  // This rate is based on the known ratio of GDP-Ras to GTP-Ras. Basal: Ras.GTP = 7% Stimulated 15% Time course is within 10 min, probably much faster as not all early data points are there. See Gibbs et al JBC 265(33):20437-20422
  basal_GEF_558_0_: GDP_Ras_552_0_ => GTP_Ras_550_0_; kinetics_464_0_*basal_GEF_558_0__Kf*GDP_Ras_552_0_;
    basal_GEF_558_0__Kf = 0.0026822 per_second;
  // kinetics_464_0_ * dephosph_Shc_577_0__Kf * SHC_p_564_0_
  // Time course of decline of phosph is 20 min from Sasaoka et al 1994 JBC 269(51):32621. Part of this is the turnoff time of the EGFR itself. Lets assume a tau of 10 min for this dephosphorylation as a first pass. 27 Apr 2001: Dephosph too slow, shifts SHC balance over to phosphorylated form. Increase Kf to 0.01. This gives a reasonable overall time-course.
  dephosph_Shc_577_0_: SHC_p_564_0_ => SHC_562_0_; kinetics_464_0_*dephosph_Shc_577_0__Kf*SHC_p_564_0_;
    dephosph_Shc_577_0__Kf = 0.05 per_second;
  // kinetics_464_0_ * Internalize_579_0__Kf * L_EGFR_572_0_^2-kinetics_464_0_ * Internalize_579_0__Kb * Internal_L_EGFR_568_0_
  // Original model derived from EGFR model. See Helin and Beguinot JBC 266:13 1991 pg 8363-8368. In Fig 3 they have internalization tau about 10 min, equil at about 20% EGF available. So kf = 4x kb, and 1/(kf + kb) = 600 sec so kb = 1/3K = 3.3e-4, and kf = 1.33e-3. This doesn't take into account the unbound receptor, so we need to push the kf up a bit, to 0.002 26 apr 2001: Keq too low for the PDGF model. Now Kf=0.001,Kb=0.00066 The previously calculated internalization equilibrium led to very high internalization which shifted the effective dependence of the receptor on PDGF so it looked like the receptor binding was higher affinity than experimentally determined. Used two constraining factors: 1. Time course of SHC phosphorylation/dephosphorylation which is fast on, but 10-20 minutes off. 2. Conc dependence of MAPK on PDGF has a halfmax around 3ng/ml. See Brondello et al 1997 JBC 272(2):1368-1376 and Brondello et al 1999 Science 286:2514-1517.
  Internalize_579_0_: 2 L_EGFR_572_0_ -> Internal_L_EGFR_568_0_; kinetics_464_0_*Internalize_579_0__Kf*L_EGFR_572_0_^2 - kinetics_464_0_*Internalize_579_0__Kb*Internal_L_EGFR_568_0_;
    Internalize_579_0__Kf = 199.9991 litre_per_mmole_per_second; Internalize_579_0__Kb = 0.005 per_second;
  // kinetics_464_0_ * act_EGFR_581_0__Kf * EGFR_566_0_*EGF_570_0_-kinetics_464_0_ * act_EGFR_581_0__Kb * L_EGFR_572_0_
  // From Heidaran et al JBC268(13):9287 Fig 5. Kd is ~0.5 nM
  act_EGFR_581_0_: EGFR_566_0_ + $EGF_570_0_ -> L_EGFR_572_0_; kinetics_464_0_*act_EGFR_581_0__Kf*EGFR_566_0_*EGF_570_0_ - kinetics_464_0_*act_EGFR_581_0__Kb*L_EGFR_572_0_;
    act_EGFR_581_0__Kf = 26744.39 litre_per_mmole_per_second; act_EGFR_581_0__Kb = 0.013142 per_second;
  // kinetics_464_0_ * ( k1 * Shc_p_dot_Sos_dot_Grb2_483_0_*GDP_Ras_552_0_ - k2 * Sos_dot_Ras_GEF_cplx_486_0_ )
  // Rates from Orita et al JBC 268(34):25542-25546
  Sos_dot_Ras_GEF_485_0_Complex_formation_: Shc_p_dot_Sos_dot_Grb2_483_0_ + GDP_Ras_552_0_ -> Sos_dot_Ras_GEF_cplx_486_0_; kinetics_464_0_*(Sos_dot_Ras_GEF_485_0_Complex_formation__k1*Shc_p_dot_Sos_dot_Grb2_483_0_*GDP_Ras_552_0_ - Sos_dot_Ras_GEF_485_0_Complex_formation__k2*Sos_dot_Ras_GEF_cplx_486_0_); Sos_dot_Ras_GEF_485_0_Complex_formation_ is "Sos.Ras_GEF";
    Sos_dot_Ras_GEF_485_0_Complex_formation__k1 = 16101.16 litre_per_mmole_per_second; Sos_dot_Ras_GEF_485_0_Complex_formation__k2 = 9.0414 per_second;
  // kinetics_464_0_ * k3*Sos_dot_Ras_GEF_cplx_486_0_
  Sos_dot_Ras_GEF_485_0_Product_formation_: Sos_dot_Ras_GEF_cplx_486_0_ => GTP_Ras_550_0_ + Shc_p_dot_Sos_dot_Grb2_483_0_; kinetics_464_0_*Sos_dot_Ras_GEF_485_0_Product_formation__k3*Sos_dot_Ras_GEF_cplx_486_0_; Sos_dot_Ras_GEF_485_0_Product_formation_ is "Sos.Ras_GEF";
    Sos_dot_Ras_GEF_485_0_Product_formation__k3 = 2.2604 per_second;
  // kinetics_464_0_ * ( k1 * MAPKK_p_506_0_*MAPK_502_0_ - k2 * MAPKKtyr_cplx_509_0_ )
  // The actual MAPKK is 2 forms from Seger et al JBC 267:20 14373(1992) Vmax = 150nmol/min/mg From Haystead et al FEBS 306(1):17-22 we get Km=46.6nM for at least one of the phosphs. Putting these together: k3=0.15/sec, ratio of 4 to get k2=0.6. k1=0.75/46.6nM=2.7e-5 In terms of Michaelis-Menten rates, Km = 0.046, Vmax = 0.15, ratio = 4.
  MAPKKtyr_508_0_Complex_formation_: MAPKK_p_506_0_ + MAPK_502_0_ -> MAPKKtyr_cplx_509_0_; kinetics_464_0_*(MAPKKtyr_508_0_Complex_formation__k1*MAPKK_p_506_0_*MAPK_502_0_ - MAPKKtyr_508_0_Complex_formation__k2*MAPKKtyr_cplx_509_0_);
    MAPKKtyr_508_0_Complex_formation__k1 = 10112.96 litre_per_mmole_per_second; MAPKKtyr_508_0_Complex_formation__k2 = 0.39339 per_second;
  // kinetics_464_0_ * k3*MAPKKtyr_cplx_509_0_
  MAPKKtyr_508_0_Product_formation_: MAPKKtyr_cplx_509_0_ => MAPK_tyr_504_0_ + MAPKK_p_506_0_; kinetics_464_0_*MAPKKtyr_508_0_Product_formation__k3*MAPKKtyr_cplx_509_0_;
    MAPKKtyr_508_0_Product_formation__k3 = 0.098347 per_second;
  // kinetics_464_0_ * ( k1 * MAPKK_p_506_0_*MAPK_tyr_504_0_ - k2 * MAPKKthr_cplx_512_0_ )
  // Rate consts same as for MAPKKtyr.
  MAPKKthr_511_0_Complex_formation_: MAPKK_p_506_0_ + MAPK_tyr_504_0_ -> MAPKKthr_cplx_512_0_; kinetics_464_0_*(MAPKKthr_511_0_Complex_formation__k1*MAPKK_p_506_0_*MAPK_tyr_504_0_ - MAPKKthr_511_0_Complex_formation__k2*MAPKKthr_cplx_512_0_);
    MAPKKthr_511_0_Complex_formation__k1 = 865.2612 litre_per_mmole_per_second; MAPKKthr_511_0_Complex_formation__k2 = 0.38071 per_second;
  // kinetics_464_0_ * k3*MAPKKthr_cplx_512_0_
  MAPKKthr_511_0_Product_formation_: MAPKKthr_cplx_512_0_ => MAPK_p_540_0_ + MAPKK_p_506_0_; kinetics_464_0_*MAPKKthr_511_0_Product_formation__k3*MAPKKthr_cplx_512_0_;
    MAPKKthr_511_0_Product_formation__k3 = 0.095179 per_second;
  // kinetics_464_0_ * ( k1 * RGR_516_0_*MAPKK_500_0_ - k2 * RGR_dot_1_cplx_519_0_ )
  // Kinetics are the same as for the craf-1* activity, ie., k1=5.5e-6, k2=.42, k3 =0.105 These are based on Force et al PNAS USA 91 1270-1274 1994.
  RGR_dot_1_518_0_Complex_formation_: RGR_516_0_ + MAPKK_500_0_ -> RGR_dot_1_cplx_519_0_; kinetics_464_0_*(RGR_dot_1_518_0_Complex_formation__k1*RGR_516_0_*MAPKK_500_0_ - RGR_dot_1_518_0_Complex_formation__k2*RGR_dot_1_cplx_519_0_); RGR_dot_1_518_0_Complex_formation_ is "RGR.1";
    RGR_dot_1_518_0_Complex_formation__k1 = 2998.624 litre_per_mmole_per_second; RGR_dot_1_518_0_Complex_formation__k2 = 0.42 per_second;
  // kinetics_464_0_ * k3*RGR_dot_1_cplx_519_0_
  RGR_dot_1_518_0_Product_formation_: RGR_dot_1_cplx_519_0_ => MAPKK_ser_514_0_ + RGR_516_0_; kinetics_464_0_*RGR_dot_1_518_0_Product_formation__k3*RGR_dot_1_cplx_519_0_; RGR_dot_1_518_0_Product_formation_ is "RGR.1";
    RGR_dot_1_518_0_Product_formation__k3 = 0.105 per_second;
  // kinetics_464_0_ * ( k1 * RGR_516_0_*MAPKK_ser_514_0_ - k2 * RGR_dot_2_cplx_522_0_ )
  // Same kinetics as other c-raf activated forms. See Force et al PNAS 91 1270-1274 1994. k1 = 5.5e-6, k2 = .42, k3 = 0.105
  RGR_dot_2_521_0_Complex_formation_: RGR_516_0_ + MAPKK_ser_514_0_ -> RGR_dot_2_cplx_522_0_; kinetics_464_0_*(RGR_dot_2_521_0_Complex_formation__k1*RGR_516_0_*MAPKK_ser_514_0_ - RGR_dot_2_521_0_Complex_formation__k2*RGR_dot_2_cplx_522_0_); RGR_dot_2_521_0_Complex_formation_ is "RGR.2";
    RGR_dot_2_521_0_Complex_formation__k1 = 2998.624 litre_per_mmole_per_second; RGR_dot_2_521_0_Complex_formation__k2 = 0.42 per_second;
  // kinetics_464_0_ * k3*RGR_dot_2_cplx_522_0_
  RGR_dot_2_521_0_Product_formation_: RGR_dot_2_cplx_522_0_ => MAPKK_p_506_0_ + RGR_516_0_; kinetics_464_0_*RGR_dot_2_521_0_Product_formation__k3*RGR_dot_2_cplx_522_0_; RGR_dot_2_521_0_Product_formation_ is "RGR.2";
    RGR_dot_2_521_0_Product_formation__k3 = 0.105 per_second;
  // kinetics_464_0_ * ( k1 * MKP_2_524_0_*MAPK_tyr_504_0_ - k2 * MKP2_tyr_deph_cplx_527_0_ )
  // 22 Apr 2001: Based on MKP1 parms. The original kinetics have been modified to obey the k2 = 4 * k3 rule, while keeping kcat and Km fixed. The only constraining data point is the time course of MAPK dephosphorylation, which this model satisfies. The rates are treated as the same as for MKP-1, based on Chu et al 1995 JBC 271(11):6497-6501
  MKP2_tyr_deph_526_0_Complex_formation_: MKP_2_524_0_ + MAPK_tyr_504_0_ -> MKP2_tyr_deph_cplx_527_0_; kinetics_464_0_*(MKP2_tyr_deph_526_0_Complex_formation__k1*MKP_2_524_0_*MAPK_tyr_504_0_ - MKP2_tyr_deph_526_0_Complex_formation__k2*MKP2_tyr_deph_cplx_527_0_);
    MKP2_tyr_deph_526_0_Complex_formation__k1 = 21846.19 litre_per_mmole_per_second; MKP2_tyr_deph_526_0_Complex_formation__k2 = 1.4324 per_second;
  // kinetics_464_0_ * k3*MKP2_tyr_deph_cplx_527_0_
  MKP2_tyr_deph_526_0_Product_formation_: MKP2_tyr_deph_cplx_527_0_ => MAPK_502_0_ + MKP_2_524_0_; kinetics_464_0_*MKP2_tyr_deph_526_0_Product_formation__k3*MKP2_tyr_deph_cplx_527_0_;
    MKP2_tyr_deph_526_0_Product_formation__k3 = 0.35808 per_second;
  // kinetics_464_0_ * ( k1 * MKP_2_524_0_*MAPK_p_540_0_ - k2 * MKP2_thr_deph_cplx_530_0_ )
  // See MKP2-tyr-deph
  MKP2_thr_deph_529_0_Complex_formation_: MKP_2_524_0_ + MAPK_p_540_0_ -> MKP2_thr_deph_cplx_530_0_; kinetics_464_0_*(MKP2_thr_deph_529_0_Complex_formation__k1*MKP_2_524_0_*MAPK_p_540_0_ - MKP2_thr_deph_529_0_Complex_formation__k2*MKP2_thr_deph_cplx_530_0_);
    MKP2_thr_deph_529_0_Complex_formation__k1 = 69038.68 litre_per_mmole_per_second; MKP2_thr_deph_529_0_Complex_formation__k2 = 1.4006 per_second;
  // kinetics_464_0_ * k3*MKP2_thr_deph_cplx_530_0_
  MKP2_thr_deph_529_0_Product_formation_: MKP2_thr_deph_cplx_530_0_ => MAPK_tyr_504_0_ + MKP_2_524_0_; kinetics_464_0_*MKP2_thr_deph_529_0_Product_formation__k3*MKP2_thr_deph_cplx_530_0_;
    MKP2_thr_deph_529_0_Product_formation__k3 = 0.35017 per_second;
  // kinetics_464_0_ * ( k1 * PPhosphatase2A_532_0_*MAPKK_p_506_0_ - k2 * MAPKK_deph_cplx_535_0_ )
  // See: Kyriakis et al Nature 358 pp 417-421 1992 Ahn et al Curr Op Cell Biol 4:992-999 1992 for this pathway. See parent PPhosphatase2A for parms.
  MAPKK_deph_534_0_Complex_formation_: PPhosphatase2A_532_0_ + MAPKK_p_506_0_ -> MAPKK_deph_cplx_535_0_; kinetics_464_0_*(MAPKK_deph_534_0_Complex_formation__k1*PPhosphatase2A_532_0_*MAPKK_p_506_0_ - MAPKK_deph_534_0_Complex_formation__k2*MAPKK_deph_cplx_535_0_);
    MAPKK_deph_534_0_Complex_formation__k1 = 1799.214 litre_per_mmole_per_second; MAPKK_deph_534_0_Complex_formation__k2 = 25 per_second;
  // kinetics_464_0_ * k3*MAPKK_deph_cplx_535_0_
  MAPKK_deph_534_0_Product_formation_: MAPKK_deph_cplx_535_0_ => MAPKK_ser_514_0_ + PPhosphatase2A_532_0_; kinetics_464_0_*MAPKK_deph_534_0_Product_formation__k3*MAPKK_deph_cplx_535_0_;
    MAPKK_deph_534_0_Product_formation__k3 = 6 per_second;
  // kinetics_464_0_ * ( k1 * PPhosphatase2A_532_0_*MAPKK_ser_514_0_ - k2 * MAPKK_deph_ser_cplx_538_0_ )
  // See parent PPhostphatase2A description for rate details
  MAPKK_deph_ser_537_0_Complex_formation_: PPhosphatase2A_532_0_ + MAPKK_ser_514_0_ -> MAPKK_deph_ser_cplx_538_0_; kinetics_464_0_*(MAPKK_deph_ser_537_0_Complex_formation__k1*PPhosphatase2A_532_0_*MAPKK_ser_514_0_ - MAPKK_deph_ser_537_0_Complex_formation__k2*MAPKK_deph_ser_cplx_538_0_);
    MAPKK_deph_ser_537_0_Complex_formation__k1 = 50.98427 litre_per_mmole_per_second; MAPKK_deph_ser_537_0_Complex_formation__k2 = 1.7125 per_second;
  // kinetics_464_0_ * k3*MAPKK_deph_ser_cplx_538_0_
  MAPKK_deph_ser_537_0_Product_formation_: MAPKK_deph_ser_cplx_538_0_ => MAPKK_500_0_ + PPhosphatase2A_532_0_; kinetics_464_0_*MAPKK_deph_ser_537_0_Product_formation__k3*MAPKK_deph_ser_cplx_538_0_;
    MAPKK_deph_ser_537_0_Product_formation__k3 = 0.41099 per_second;
  // kinetics_464_0_ * ( k1 * MAPK_p_540_0_*Sos_481_0_ - k2 * MAPK_phosph_Sos_cplx_543_0_ )
  MAPK_phosph_Sos_542_0_Complex_formation_: MAPK_p_540_0_ + Sos_481_0_ -> MAPK_phosph_Sos_cplx_543_0_; kinetics_464_0_*(MAPK_phosph_Sos_542_0_Complex_formation__k1*MAPK_p_540_0_*Sos_481_0_ - MAPK_phosph_Sos_542_0_Complex_formation__k2*MAPK_phosph_Sos_cplx_543_0_);
    MAPK_phosph_Sos_542_0_Complex_formation__k1 = 249.078 litre_per_mmole_per_second; MAPK_phosph_Sos_542_0_Complex_formation__k2 = 2 per_second;
  // kinetics_464_0_ * k3*MAPK_phosph_Sos_cplx_543_0_
  MAPK_phosph_Sos_542_0_Product_formation_: MAPK_phosph_Sos_cplx_543_0_ => Sos_p_479_0_ + MAPK_p_540_0_; kinetics_464_0_*MAPK_phosph_Sos_542_0_Product_formation__k3*MAPK_phosph_Sos_cplx_543_0_;
    MAPK_phosph_Sos_542_0_Product_formation__k3 = 0.5 per_second;
  // kinetics_464_0_ * ( k1 * MAPK_p_540_0_*Shc_p_dot_Sos_dot_Grb2_483_0_ - k2 * MAPK_phosph_SHC_p_Sos_Grb2_cplx_546_0_ )
  MAPK_phosph_SHC_p_Sos_Grb2_545_0_Complex_formation_: MAPK_p_540_0_ + Shc_p_dot_Sos_dot_Grb2_483_0_ -> MAPK_phosph_SHC_p_Sos_Grb2_cplx_546_0_; kinetics_464_0_*(MAPK_phosph_SHC_p_Sos_Grb2_545_0_Complex_formation__k1*MAPK_p_540_0_*Shc_p_dot_Sos_dot_Grb2_483_0_ - MAPK_phosph_SHC_p_Sos_Grb2_545_0_Complex_formation__k2*MAPK_phosph_SHC_p_Sos_Grb2_cplx_546_0_);
    MAPK_phosph_SHC_p_Sos_Grb2_545_0_Complex_formation__k1 = 249.078 litre_per_mmole_per_second; MAPK_phosph_SHC_p_Sos_Grb2_545_0_Complex_formation__k2 = 2 per_second;
  // kinetics_464_0_ * k3*MAPK_phosph_SHC_p_Sos_Grb2_cplx_546_0_
  MAPK_phosph_SHC_p_Sos_Grb2_545_0_Product_formation_: MAPK_phosph_SHC_p_Sos_Grb2_cplx_546_0_ => Sos_p_dot_Grb2_473_0_ + SHC_p_564_0_ + MAPK_p_540_0_; kinetics_464_0_*MAPK_phosph_SHC_p_Sos_Grb2_545_0_Product_formation__k3*MAPK_phosph_SHC_p_Sos_Grb2_cplx_546_0_;
    MAPK_phosph_SHC_p_Sos_Grb2_545_0_Product_formation__k3 = 0.5 per_second;
  // kinetics_464_0_ * ( k1 * L_EGFR_572_0_*SHC_562_0_ - k2 * phosph_Shc_cplx_575_0_ )
  // Rates from Okada et al JBC 270:35 pp 20737 1995 Km = 0.70 to 0.85 uM, Vmax = 4.4 to 5.0 pmol/min. Unfortunately the amount of enzyme is not known, the prep is only partially purified. Tau phosph is max within 30 sec, falls back within 20 min. Ref: Sasaoka et al JBC 269:51 32621 1994. Use k3 = 0.1 based on this tau. 27 Apr 2001: Lowered k3 to 0.05 to fix conc-effect of SHC phosph by PDGF. This gives results for downstream effects in agreement with other papers, e.g., the Brondello papers.
  phosph_Shc_574_0_Complex_formation_: L_EGFR_572_0_ + SHC_562_0_ -> phosph_Shc_cplx_575_0_; kinetics_464_0_*(phosph_Shc_574_0_Complex_formation__k1*L_EGFR_572_0_*SHC_562_0_ - phosph_Shc_574_0_Complex_formation__k2*phosph_Shc_cplx_575_0_);
    phosph_Shc_574_0_Complex_formation__k1 = 495.3245 litre_per_mmole_per_second; phosph_Shc_574_0_Complex_formation__k2 = 0.76212 per_second;
  // kinetics_464_0_ * k3*phosph_Shc_cplx_575_0_
  phosph_Shc_574_0_Product_formation_: phosph_Shc_cplx_575_0_ => SHC_p_564_0_ + L_EGFR_572_0_; kinetics_464_0_*phosph_Shc_574_0_Product_formation__k3*phosph_Shc_cplx_575_0_;
    phosph_Shc_574_0_Product_formation__k3 = 0.19053 per_second;

  // Unit definitions:
  unit volume = litre;
  unit substance = 1e-3 mole;
  unit length = metre;
  unit area = metre^2;
  unit time = second;
  unit litre_per_mmole_per_second = litre / (1e-3 mole * second);
  unit per_second = 1 / second;
end
