// SBML level 3 version 1

model b2AR_PKA_v5()
  // model units - substance: substance, time: time, volume: volume, area: area, length: length, extent: substance

  // Compartments:
  compartment kinetics_464_0_ = 1.4614e-12 volume;

  // Species:
  species CaM_Ca4_473_0_ in kinetics_464_0_ = 0;
  // There is a LOT of this in the cell: upto 1% of total protein mass. (Alberts et al) Say 25 uM. Meyer et al Science 256 1199-1202 1992 refer to studies saying it is comparable to CaMK levels.
  species CaM_475_0_ in kinetics_464_0_ = 0.02022262;
  species neurogranin_CaM_477_0_ in kinetics_464_0_ = 0;
  // The phosph form does not bind CaM (Huang et al ABB 305:2 570-580 1993)
  species neurogranin_p_479_0_ in kinetics_464_0_ = 0;
  // Also known as RC3 and p17 and BICKS. Conc in brain _greaterthan__greaterthan_ 2 uM from Martzen and Slemmon J neurosci 64 92-100 1995 but others say less without any #s. Conc in dend spines is much higher than overall, so it could be anywhere from 2 uM to 50. We will estimate 10 uM as a starting point. Gerendasy et al JBC 269:35 22420-22426 1994 have a skeleton model (no numbers) indicating CaM-Ca(n) binding ....
  species neurogranin_481_0_ in kinetics_464_0_ = 0.01011108;
  species CaM_Ca3_483_0_ in kinetics_464_0_ = 0;
  // This is the intermediate where the TR2 end (the high-affinity end) has bound the Ca but the TR1 end has not.
  species CaM_Ca2_485_0_ in kinetics_464_0_ = 0;
  // This is the intermediate where the TR2 end (the high-affinity end) has bound the Ca but the TR1 end has not.
  species CaM_Ca_487_0_ in kinetics_464_0_ = 0;
  species PKA_active_503_0_ in kinetics_464_0_ = 0;
  species phosph_PDE_cplx_506_0_ in kinetics_464_0_ = 0;
  // This is the R2C2 complex, consisting of 2 catalytic (C) subunits, and the R-dimer. See Taylor et al Ann Rev Biochem 1990 59:971-1005 for a review. The Doskeland and Ogreid review is better for numbers. Amount of PKA is about .5 uM.
  species R2C2_508_0_ in kinetics_464_0_ = 0.0005055654;
  // CoInit was .0624
  species R2C2_cAMP_510_0_ in kinetics_464_0_ = 0;
  species R2C2_cAMP2_512_0_ in kinetics_464_0_ = 0;
  species R2C2_cAMP3_514_0_ in kinetics_464_0_ = 0;
  species R2C2_cAMP4_516_0_ in kinetics_464_0_ = 0;
  species R2C_cAMP4_518_0_ in kinetics_464_0_ = 0;
  // Starts at 0.15 for the test of fig 6 in Smith et al, but we aren't using that paper any more.
  species R2_cAMP4_520_0_ in kinetics_464_0_ = 0;
  // About 25% of PKA C subunit is dissociated in resting cells without having any noticable activity. Doskeland and Ogreid Int J biochem 13 pp1-19 suggest that this is because there is a corresponding amount of inhibitor protein.
  species PKA_inhibitor_522_0_ in kinetics_464_0_ = 0.0002527827;
  species inhibited_PKA_524_0_ in kinetics_464_0_ = 0;
  // The conc of this has been a problem. Schaecter and Benowitz use 50 uM, but Shinomura et al have _lessthan_ 5. So I have altered the cAMP-dependent rates in the PKA model to reflect this.
  species cAMP_542_0_ in kinetics_464_0_ = 0;
  // ATP is present in all cells between 2 and 10 mM. See Lehninger.
  species $ATP_544_0_ in kinetics_464_0_ = 5.055654;
  // This version of cyclase is Calmodulin activated. Gs stims it but betagamma inhibits.
  species AC1_CaM_546_0_ in kinetics_464_0_ = 0;
  // Starting conc at 20 nM.
  species AC1_550_0_ in kinetics_464_0_ = 2.022262e-5;
  // This version is activated by Gs and by a betagamma and phosphorylation.
  species AC2p_552_0_ in kinetics_464_0_ = 0;
  species AC2_Gs_556_0_ in kinetics_464_0_ = 0;
  // Starting at 0.015 uM.
  species AC2_560_0_ in kinetics_464_0_ = 1.516696e-5;
  species AC1_Gs_562_0_ in kinetics_464_0_ = 0;
  species AC2p_Gs_566_0_ in kinetics_464_0_ = 0;
  species AMP_570_0_ in kinetics_464_0_ = 1.011108;
  species $Ca_584_0_ in kinetics_464_0_ = 8.088819e-5;
  species Gs_alpha_GTP_588_0_ in kinetics_464_0_ = 0;
  species Gs_GDP_590_0_ in kinetics_464_0_ = 0.001011108;
  species Gs_alpha_GDP_592_0_ in kinetics_464_0_ = 0;
  species BetaGamma_602_0_ in kinetics_464_0_ = 0;
  species Epinephrine_606_0_ in kinetics_464_0_ = 0;
  species Isoproterenol_608_0_ in kinetics_464_0_ = 0;
  species b2AR_610_0_ in kinetics_464_0_ = 8.422517e-5;
  species L_b2AR_612_0_ in kinetics_464_0_ = 0;
  species Lb2AR_GsGDP_614_0_ in kinetics_464_0_ = 0;
  species b2AR_GsGDP_616_0_ in kinetics_464_0_ = 0;
  // CaM-Dependent PDE. Amount calculated from total rate in brain vs. specific rate.
  species PDE1_632_0_ in kinetics_464_0_ = 0.002022262;
  species PDE1_cplx_635_0_ in kinetics_464_0_ = 0;
  // Activity up 6x following Ca-CaM binding.
  species CaM_PDE1_637_0_ in kinetics_464_0_ = 0;
  species CaM_PDE1_cplx_640_0_ in kinetics_464_0_ = 0;
  // This form has about 2X activity as plain PDE. See Sette et al JBC 269:28 18271-18274 1994.
  species cAMP_PDEp_642_0_ in kinetics_464_0_ = 0;
  species ePDE_p_cplx_645_0_ in kinetics_464_0_ = 0;
  // The levels of the PDE are not known at this time. However, enough kinetic info and info about steady-state levels of cAMP etc are around to make it possible to estimate this.
  species cAMP_PDE_647_0_ in kinetics_464_0_ = 0.0004549975;
  species ePDE_cplx_650_0_ in kinetics_464_0_ = 0;

  // Reactions:
  // kinetics_464_0_ * CaM_Ca3_bind_Ca_489_0__Kf * CaM_Ca3_483_0_*Ca_584_0_-kinetics_464_0_ * CaM_Ca3_bind_Ca_489_0__Kb * CaM_Ca4_473_0_
  // Use K3 = 21.5 uM here from Stemmer and Klee table 3. kb/kf =21.5 * 6e5 so kf = 7.75e-7, kb = 10
  CaM_Ca3_bind_Ca_489_0_: CaM_Ca3_483_0_ + $Ca_584_0_ -> CaM_Ca4_473_0_; kinetics_464_0_*CaM_Ca3_bind_Ca_489_0__Kf*CaM_Ca3_483_0_*Ca_584_0_ - kinetics_464_0_*CaM_Ca3_bind_Ca_489_0__Kb*CaM_Ca4_473_0_;
    CaM_Ca3_bind_Ca_489_0__Kf = 0.094304142 litre_per_mmole_per_second; CaM_Ca3_bind_Ca_489_0__Kb = 0.03688 per_second;
  // kinetics_464_0_ * neurogranin_bind_CaM_491_0__Kf * CaM_475_0_*neurogranin_481_0_-kinetics_464_0_ * neurogranin_bind_CaM_491_0__Kb * neurogranin_CaM_477_0_
  // Surprisingly, no direct info on rates from neurogranin at this time. These rates are based on GAP-43 binding studies. As GAP-43 and neurogranin share near identity in the CaM/PKC binding regions, and also similarity in phosph and dephosph rates, I am borrowing GAP-43 kinetic info. See Alexander et al JBC 262:13 6108-6113 1987
  neurogranin_bind_CaM_491_0_: CaM_475_0_ + neurogranin_481_0_ -> neurogranin_CaM_477_0_; kinetics_464_0_*neurogranin_bind_CaM_491_0__Kf*CaM_475_0_*neurogranin_481_0_ - kinetics_464_0_*neurogranin_bind_CaM_491_0__Kb*neurogranin_CaM_477_0_;
    neurogranin_bind_CaM_491_0__Kf = 300.002 litre_per_mmole_per_second; neurogranin_bind_CaM_491_0__Kb = 1 per_second;
  // kinetics_464_0_ * dephosph_neurogranin_493_0__Kf * neurogranin_p_479_0_
  // This is put in to keep the basal levels of neurogranin* experimentally reasonable. From various papers, specially Ramakers et al JBC 270:23 1995 13892-13898, it looks like the basal level of phosph is between 20 and 40%. I est around 25 % The kf of 0.005 gives around this level at basal PKC activity levels of 0.1 uM active PKC.
  dephosph_neurogranin_493_0_: neurogranin_p_479_0_ => neurogranin_481_0_; kinetics_464_0_*dephosph_neurogranin_493_0__Kf*neurogranin_p_479_0_;
    dephosph_neurogranin_493_0__Kf = 0.005 per_second;
  // kinetics_464_0_ * CaM_bind_Ca_495_0__Kf * CaM_475_0_*Ca_584_0_-kinetics_464_0_ * CaM_bind_Ca_495_0__Kb * CaM_Ca_487_0_
  // Lets use the fast rate consts here. Since the rates are so different, I am not sure whether the order is relevant. These correspond to the TR2C fragment. We use the Martin et al rates here, plus the Drabicowski binding consts. All are scaled by 3X to cell temp. kf = 2e-10 kb = 72 Stemmer _and Klee: K1=.9, K2=1.1. Assume 1.0uM for both. kb/kf=3.6e11. If kb=72, kf = 2e-10 (Exactly the same !) 19 May 2006. Splitting the old CaM-TR2-bind-Ca reaction into two steps, each binding 1 Ca. This improves numerical stability and is conceptually better too. Overall rates are the same, so each kf and kb is the square root of the earlier ones. So kf = 1.125e-4, kb = 8.4853
  CaM_bind_Ca_495_0_: CaM_475_0_ + $Ca_584_0_ -> CaM_Ca_487_0_; kinetics_464_0_*CaM_bind_Ca_495_0__Kf*CaM_475_0_*Ca_584_0_ - kinetics_464_0_*CaM_bind_Ca_495_0__Kb*CaM_Ca_487_0_;
    CaM_bind_Ca_495_0__Kf = 5472.008 litre_per_mmole_per_second; CaM_bind_Ca_495_0__Kb = 10.34 per_second;
  // kinetics_464_0_ * CaM_Ca2_bind_Ca_497_0__Kf * CaM_Ca2_485_0_*Ca_584_0_-kinetics_464_0_ * CaM_Ca2_bind_Ca_497_0__Kb * CaM_Ca3_483_0_
  // K3 = 21.5, K4 = 2.8. Assuming that the K4 step happens first, we get kb/kf = 2.8 uM = 1.68e6 so kf =6e-6 assuming kb = 10
  CaM_Ca2_bind_Ca_497_0_: CaM_Ca2_485_0_ + $Ca_584_0_ -> CaM_Ca3_483_0_; kinetics_464_0_*CaM_Ca2_bind_Ca_497_0__Kf*CaM_Ca2_485_0_*Ca_584_0_ - kinetics_464_0_*CaM_Ca2_bind_Ca_497_0__Kb*CaM_Ca3_483_0_;
    CaM_Ca2_bind_Ca_497_0__Kf = 129.6057 litre_per_mmole_per_second; CaM_Ca2_bind_Ca_497_0__Kb = 2.4355 per_second;
  // kinetics_464_0_ * CaM_Ca_bind_Ca_499_0__Kf * CaM_Ca_487_0_*Ca_584_0_-kinetics_464_0_ * CaM_Ca_bind_Ca_499_0__Kb * CaM_Ca2_485_0_
  // Lets use the fast rate consts here. Since the rates are so different, I am not sure whether the order is relevant. These correspond to the TR2C fragment. We use the Martin et al rates here, plus the Drabicowski binding consts. All are scaled by 3X to cell temp. kf = 2e-10 kb = 72 Stemmer _and Klee: K1=.9, K2=1.1. Assume 1.0uM for both. kb/kf=3.6e11. If kb=72, kf = 2e-10 (Exactly the same !) 19 May 2006. Splitting the old CaM-TR2-bind-Ca reaction into two steps, each binding 1 Ca. This improves numerical stability and is conceptually better too. Overall rates are the same, so each kf and kb is the square root of the earlier ones. So kf = 1.125e-4, kb = 8.4853
  CaM_Ca_bind_Ca_499_0_: CaM_Ca_487_0_ + $Ca_584_0_ -> CaM_Ca2_485_0_; kinetics_464_0_*CaM_Ca_bind_Ca_499_0__Kf*CaM_Ca_487_0_*Ca_584_0_ - kinetics_464_0_*CaM_Ca_bind_Ca_499_0__Kb*CaM_Ca2_485_0_;
    CaM_Ca_bind_Ca_499_0__Kf = 3186.87498 litre_per_mmole_per_second; CaM_Ca_bind_Ca_499_0__Kb = 6.5064 per_second;
  // kinetics_464_0_ * cAMP_bind_site_B1_526_0__Kf * R2C2_508_0_*cAMP_542_0_-kinetics_464_0_ * cAMP_bind_site_B1_526_0__Kb * R2C2_cAMP_510_0_
  // Hasler et al FASEB J 6:2734-2741 1992 say Kd =1e-7M for type II, 5.6e-8 M for type I. Take mean which comes to 2e-13 #/cell Smith et al PNAS USA 78:3 1591-1595 1981 have better data. First kf/kb=2.1e7/M = 3.5e-5 (#/cell). Ogreid and Doskeland Febs Lett 129:2 287-292 1981 have figs suggesting time course of complete assoc is _lessthan_ 1 min.
  cAMP_bind_site_B1_526_0_: R2C2_508_0_ + cAMP_542_0_ -> R2C2_cAMP_510_0_; kinetics_464_0_*cAMP_bind_site_B1_526_0__Kf*R2C2_508_0_*cAMP_542_0_ - kinetics_464_0_*cAMP_bind_site_B1_526_0__Kb*R2C2_cAMP_510_0_;
    cAMP_bind_site_B1_526_0__Kf = 53999.31 litre_per_mmole_per_second; cAMP_bind_site_B1_526_0__Kb = 33 per_second;
  // kinetics_464_0_ * cAMP_bind_site_B2_528_0__Kf * R2C2_cAMP_510_0_*cAMP_542_0_-kinetics_464_0_ * cAMP_bind_site_B2_528_0__Kb * R2C2_cAMP2_512_0_
  // For now let us set this to the same Km (1e-7M) as site B. This gives kf/kb = .7e-7M * 1e6 / (6e5^2) : 1/(6e5^2) = 2e-13:2.77e-12 Smith et al have better values. They say that this is cooperative, so the consts are now kf/kb =8.3e-4
  cAMP_bind_site_B2_528_0_: R2C2_cAMP_510_0_ + cAMP_542_0_ -> R2C2_cAMP2_512_0_; kinetics_464_0_*cAMP_bind_site_B2_528_0__Kf*R2C2_cAMP_510_0_*cAMP_542_0_ - kinetics_464_0_*cAMP_bind_site_B2_528_0__Kb*R2C2_cAMP2_512_0_;
    cAMP_bind_site_B2_528_0__Kf = 53999.31 litre_per_mmole_per_second; cAMP_bind_site_B2_528_0__Kb = 33 per_second;
  // kinetics_464_0_ * cAMP_bind_site_A1_530_0__Kf * R2C2_cAMP2_512_0_*cAMP_542_0_-kinetics_464_0_ * cAMP_bind_site_A1_530_0__Kb * R2C2_cAMP3_514_0_
  cAMP_bind_site_A1_530_0_: R2C2_cAMP2_512_0_ + cAMP_542_0_ -> R2C2_cAMP3_514_0_; kinetics_464_0_*cAMP_bind_site_A1_530_0__Kf*R2C2_cAMP2_512_0_*cAMP_542_0_ - kinetics_464_0_*cAMP_bind_site_A1_530_0__Kb*R2C2_cAMP3_514_0_;
    cAMP_bind_site_A1_530_0__Kf = 75001.39 litre_per_mmole_per_second; cAMP_bind_site_A1_530_0__Kb = 110 per_second;
  // kinetics_464_0_ * cAMP_bind_site_A2_532_0__Kf * R2C2_cAMP3_514_0_*cAMP_542_0_-kinetics_464_0_ * cAMP_bind_site_A2_532_0__Kb * R2C2_cAMP4_516_0_
  cAMP_bind_site_A2_532_0_: R2C2_cAMP3_514_0_ + cAMP_542_0_ -> R2C2_cAMP4_516_0_; kinetics_464_0_*cAMP_bind_site_A2_532_0__Kf*R2C2_cAMP3_514_0_*cAMP_542_0_ - kinetics_464_0_*cAMP_bind_site_A2_532_0__Kb*R2C2_cAMP4_516_0_;
    cAMP_bind_site_A2_532_0__Kf = 75001.39 litre_per_mmole_per_second; cAMP_bind_site_A2_532_0__Kb = 32.5 per_second;
  // kinetics_464_0_ * Release_C1_534_0__Kf * R2C2_cAMP4_516_0_-kinetics_464_0_ * Release_C1_534_0__Kb * PKA_active_503_0_*R2C_cAMP4_518_0_
  // This has to be fast, as the activation of PKA by cAMP is also fast. kf was 10
  Release_C1_534_0_: R2C2_cAMP4_516_0_ -> PKA_active_503_0_ + R2C_cAMP4_518_0_; kinetics_464_0_*Release_C1_534_0__Kf*R2C2_cAMP4_516_0_ - kinetics_464_0_*Release_C1_534_0__Kb*PKA_active_503_0_*R2C_cAMP4_518_0_;
    Release_C1_534_0__Kf = 60 per_second; Release_C1_534_0__Kb = 17999.77 litre_per_mmole_per_second;
  // kinetics_464_0_ * Release_C2_536_0__Kf * R2C_cAMP4_518_0_-kinetics_464_0_ * Release_C2_536_0__Kb * PKA_active_503_0_*R2_cAMP4_520_0_
  Release_C2_536_0_: R2C_cAMP4_518_0_ -> PKA_active_503_0_ + R2_cAMP4_520_0_; kinetics_464_0_*Release_C2_536_0__Kf*R2C_cAMP4_518_0_ - kinetics_464_0_*Release_C2_536_0__Kb*PKA_active_503_0_*R2_cAMP4_520_0_;
    Release_C2_536_0__Kf = 60 per_second; Release_C2_536_0__Kb = 17999.77 litre_per_mmole_per_second;
  // kinetics_464_0_ * inhib_PKA_538_0__Kf * PKA_active_503_0_*PKA_inhibitor_522_0_-kinetics_464_0_ * inhib_PKA_538_0__Kb * inhibited_PKA_524_0_
  // This has to be set to zero for matching the expts in vitro. In vivo we need to consider the inhibition though. kf = 1e-5 kb = 1
  inhib_PKA_538_0_: PKA_active_503_0_ + PKA_inhibitor_522_0_ -> inhibited_PKA_524_0_; kinetics_464_0_*inhib_PKA_538_0__Kf*PKA_active_503_0_*PKA_inhibitor_522_0_ - kinetics_464_0_*inhib_PKA_538_0__Kb*inhibited_PKA_524_0_;
    inhib_PKA_538_0__Kf = 60000.41 litre_per_mmole_per_second; inhib_PKA_538_0__Kb = 1 per_second;
  // kinetics_464_0_ * CaM_bind_AC1_572_0__Kf * CaM_Ca4_473_0_*AC1_550_0_-kinetics_464_0_ * CaM_bind_AC1_572_0__Kb * AC1_CaM_546_0_
  // Half-max at 20 nM CaM (Tang et al JBC 266:13 8595-8603 1991 kb/kf = 20 nM = 12000 #/cell so kf = kb/12000 = kb * 8.333e-5
  CaM_bind_AC1_572_0_: CaM_Ca4_473_0_ + AC1_550_0_ -> AC1_CaM_546_0_; kinetics_464_0_*CaM_bind_AC1_572_0__Kf*CaM_Ca4_473_0_*AC1_550_0_ - kinetics_464_0_*CaM_bind_AC1_572_0__Kb*AC1_CaM_546_0_;
    CaM_bind_AC1_572_0__Kf = 50000.05 litre_per_mmole_per_second; CaM_bind_AC1_572_0__Kb = 1 per_second;
  // kinetics_464_0_ * dephosph_AC2_574_0__Kf * AC2p_552_0_
  // Random rate.
  dephosph_AC2_574_0_: AC2p_552_0_ => AC2_560_0_; kinetics_464_0_*dephosph_AC2_574_0__Kf*AC2p_552_0_;
    dephosph_AC2_574_0__Kf = 0.1 per_second;
  // kinetics_464_0_ * Gs_bind_AC2_576_0__Kf * AC2_560_0_*Gs_alpha_GTP_588_0_-kinetics_464_0_ * Gs_bind_AC2_576_0__Kb * AC2_Gs_556_0_
  // Half-max at around 3nM = kb/kf from fig 5 in Feinstein et al PNAS USA 88 10173-10177 1991 kf = kb/1800 = 5.56e-4 kb Ofer's thesis data indicates it is more like 2 nM. kf = kb/1200 = 8.33e-4
  Gs_bind_AC2_576_0_: AC2_560_0_ + Gs_alpha_GTP_588_0_ -> AC2_Gs_556_0_; kinetics_464_0_*Gs_bind_AC2_576_0__Kf*AC2_560_0_*Gs_alpha_GTP_588_0_ - kinetics_464_0_*Gs_bind_AC2_576_0__Kb*AC2_Gs_556_0_;
    Gs_bind_AC2_576_0__Kf = 500000.5 litre_per_mmole_per_second; Gs_bind_AC2_576_0__Kb = 1 per_second;
  // kinetics_464_0_ * Gs_bind_AC1_578_0__Kf * AC1_550_0_*Gs_alpha_GTP_588_0_-kinetics_464_0_ * Gs_bind_AC1_578_0__Kb * AC1_Gs_562_0_
  // Half-max 8nM from Tang et al JBC266:13 8595-8603 kb/kf = 8 nM = 4800#/cell so kf = kb * 2.08e-4
  Gs_bind_AC1_578_0_: AC1_550_0_ + Gs_alpha_GTP_588_0_ -> AC1_Gs_562_0_; kinetics_464_0_*Gs_bind_AC1_578_0__Kf*AC1_550_0_*Gs_alpha_GTP_588_0_ - kinetics_464_0_*Gs_bind_AC1_578_0__Kb*AC1_Gs_562_0_;
    Gs_bind_AC1_578_0__Kf = 126001.908 litre_per_mmole_per_second; Gs_bind_AC1_578_0__Kb = 1 per_second;
  // kinetics_464_0_ * Gs_bind_AC2p_580_0__Kf * AC2p_552_0_*Gs_alpha_GTP_588_0_-kinetics_464_0_ * Gs_bind_AC2p_580_0__Kb * AC2p_Gs_566_0_
  // kb/kf = 1.2 nM so kf = kb/720 = 1.3888 * kb.
  Gs_bind_AC2p_580_0_: AC2p_552_0_ + Gs_alpha_GTP_588_0_ -> AC2p_Gs_566_0_; kinetics_464_0_*Gs_bind_AC2p_580_0__Kf*AC2p_552_0_*Gs_alpha_GTP_588_0_ - kinetics_464_0_*Gs_bind_AC2p_580_0__Kb*AC2p_Gs_566_0_;
    Gs_bind_AC2p_580_0__Kf = 833278.6 litre_per_mmole_per_second; Gs_bind_AC2p_580_0__Kb = 1 per_second;
  // kinetics_464_0_ * Act_Gs_594_0__Kf * Lb2AR_GsGDP_614_0_
  Act_Gs_594_0_: Lb2AR_GsGDP_614_0_ => Gs_alpha_GTP_588_0_ + BetaGamma_602_0_ + L_b2AR_612_0_; kinetics_464_0_*Act_Gs_594_0__Kf*Lb2AR_GsGDP_614_0_;
    Act_Gs_594_0__Kf = 4.7395 per_second;
  // kinetics_464_0_ * basalAct_Gs_596_0__Kf * Gs_GDP_590_0_
  basalAct_Gs_596_0_: Gs_GDP_590_0_ => Gs_alpha_GTP_588_0_ + BetaGamma_602_0_; kinetics_464_0_*basalAct_Gs_596_0__Kf*Gs_GDP_590_0_;
    basalAct_Gs_596_0__Kf = 0.00044206 per_second;
  // kinetics_464_0_ * Inact_Gs_598_0__Kf * Gs_alpha_GTP_588_0_
  Inact_Gs_598_0_: Gs_alpha_GTP_588_0_ => Gs_alpha_GDP_592_0_; kinetics_464_0_*Inact_Gs_598_0__Kf*Gs_alpha_GTP_588_0_;
    Inact_Gs_598_0__Kf = 0.055304 per_second;
  // kinetics_464_0_ * Trimerize_Gs_600_0__Kf * Gs_alpha_GDP_592_0_*BetaGamma_602_0_
  Trimerize_Gs_600_0_: Gs_alpha_GDP_592_0_ + BetaGamma_602_0_ => Gs_GDP_590_0_; kinetics_464_0_*Trimerize_Gs_600_0__Kf*Gs_alpha_GDP_592_0_*BetaGamma_602_0_;
    Trimerize_Gs_600_0__Kf = 2613.071 litre_per_mmole_per_second;
  // kinetics_464_0_ * Epi_bind_b2AR_618_0__Kf * Epinephrine_606_0_*b2AR_610_0_-kinetics_464_0_ * Epi_bind_b2AR_618_0__Kb * L_b2AR_612_0_
  Epi_bind_b2AR_618_0_: Epinephrine_606_0_ + b2AR_610_0_ -> L_b2AR_612_0_; kinetics_464_0_*Epi_bind_b2AR_618_0__Kf*Epinephrine_606_0_*b2AR_610_0_ - kinetics_464_0_*Epi_bind_b2AR_618_0__Kb*L_b2AR_612_0_;
    Epi_bind_b2AR_618_0__Kf = 670.0724 litre_per_mmole_per_second; Epi_bind_b2AR_618_0__Kb = 0.4 per_second;
  // kinetics_464_0_ * Iso_bind_b2AR_620_0__Kf * Isoproterenol_608_0_*b2AR_610_0_-kinetics_464_0_ * Iso_bind_b2AR_620_0__Kb * L_b2AR_612_0_
  Iso_bind_b2AR_620_0_: Isoproterenol_608_0_ + b2AR_610_0_ -> L_b2AR_612_0_; kinetics_464_0_*Iso_bind_b2AR_620_0__Kf*Isoproterenol_608_0_*b2AR_610_0_ - kinetics_464_0_*Iso_bind_b2AR_620_0__Kb*L_b2AR_612_0_;
    Iso_bind_b2AR_620_0__Kf = 0.6000041 litre_per_mmole_per_second; Iso_bind_b2AR_620_0__Kb = 0.02 per_second;
  // kinetics_464_0_ * LR_bind_GsGDP_622_0__Kf * Gs_GDP_590_0_*L_b2AR_612_0_-kinetics_464_0_ * LR_bind_GsGDP_622_0__Kb * Lb2AR_GsGDP_614_0_
  LR_bind_GsGDP_622_0_: Gs_GDP_590_0_ + L_b2AR_612_0_ -> Lb2AR_GsGDP_614_0_; kinetics_464_0_*LR_bind_GsGDP_622_0__Kf*Gs_GDP_590_0_*L_b2AR_612_0_ - kinetics_464_0_*LR_bind_GsGDP_622_0__Kb*Lb2AR_GsGDP_614_0_;
    LR_bind_GsGDP_622_0__Kf = 1749.997 litre_per_mmole_per_second; LR_bind_GsGDP_622_0__Kb = 1.6 per_second;
  // kinetics_464_0_ * R_bind_GsGDP_624_0__Kf * Gs_GDP_590_0_*b2AR_610_0_-kinetics_464_0_ * R_bind_GsGDP_624_0__Kb * b2AR_GsGDP_616_0_
  R_bind_GsGDP_624_0_: Gs_GDP_590_0_ + b2AR_610_0_ -> b2AR_GsGDP_616_0_; kinetics_464_0_*R_bind_GsGDP_624_0__Kf*Gs_GDP_590_0_*b2AR_610_0_ - kinetics_464_0_*R_bind_GsGDP_624_0__Kb*b2AR_GsGDP_616_0_;
    R_bind_GsGDP_624_0__Kf = 115.4974 litre_per_mmole_per_second; R_bind_GsGDP_624_0__Kb = 0.217 per_second;
  // kinetics_464_0_ * Iso_bind_RGs_626_0__Kf * Isoproterenol_608_0_*b2AR_GsGDP_616_0_-kinetics_464_0_ * Iso_bind_RGs_626_0__Kb * Lb2AR_GsGDP_614_0_
  Iso_bind_RGs_626_0_: Isoproterenol_608_0_ + b2AR_GsGDP_616_0_ -> Lb2AR_GsGDP_614_0_; kinetics_464_0_*Iso_bind_RGs_626_0__Kf*Isoproterenol_608_0_*b2AR_GsGDP_616_0_ - kinetics_464_0_*Iso_bind_RGs_626_0__Kb*Lb2AR_GsGDP_614_0_;
    Iso_bind_RGs_626_0__Kf = 0.1240027 litre_per_mmole_per_second; Iso_bind_RGs_626_0__Kb = 0.0038783 per_second;
  // kinetics_464_0_ * Epi_bind_RGs_628_0__Kf * Epinephrine_606_0_*b2AR_GsGDP_616_0_-kinetics_464_0_ * Epi_bind_RGs_628_0__Kb * Lb2AR_GsGDP_614_0_
  Epi_bind_RGs_628_0_: Epinephrine_606_0_ + b2AR_GsGDP_616_0_ -> Lb2AR_GsGDP_614_0_; kinetics_464_0_*Epi_bind_RGs_628_0__Kf*Epinephrine_606_0_*b2AR_GsGDP_616_0_ - kinetics_464_0_*Epi_bind_RGs_628_0__Kb*Lb2AR_GsGDP_614_0_;
    Epi_bind_RGs_628_0__Kf = 412.2726 litre_per_mmole_per_second; Epi_bind_RGs_628_0__Kb = 0.12164 per_second;
  // kinetics_464_0_ * dephosph_PDE_652_0__Kf * cAMP_PDEp_642_0_
  // The rates for this are poorly constrained. In adipocytes (probably a different PDE) the dephosphorylation is complete within 15 min, but there are no intermediate time points so it could be much faster. Identity of phosphatase etc is still unknown.
  dephosph_PDE_652_0_: cAMP_PDEp_642_0_ => cAMP_PDE_647_0_; kinetics_464_0_*dephosph_PDE_652_0__Kf*cAMP_PDEp_642_0_;
    dephosph_PDE_652_0__Kf = 0.1 per_second;
  // kinetics_464_0_ * CaM_bind_PDE1_654_0__Kf * CaM_Ca4_473_0_*PDE1_632_0_-kinetics_464_0_ * CaM_bind_PDE1_654_0__Kb * CaM_PDE1_637_0_
  // For olf epi PDE1, affinity is 7 nM. Assume same for brain. Reaction should be pretty fast. Assume kb = 5/sec. Then kf = 5 / (0.007 * 6e5) = 1.2e-3
  CaM_bind_PDE1_654_0_: CaM_Ca4_473_0_ + PDE1_632_0_ -> CaM_PDE1_637_0_; kinetics_464_0_*CaM_bind_PDE1_654_0__Kf*CaM_Ca4_473_0_*PDE1_632_0_ - kinetics_464_0_*CaM_bind_PDE1_654_0__Kb*CaM_PDE1_637_0_;
    CaM_bind_PDE1_654_0__Kf = 720008.4 litre_per_mmole_per_second; CaM_bind_PDE1_654_0__Kb = 5 per_second;
  // kinetics_464_0_ * ( k1 * PKA_active_503_0_*cAMP_PDE_647_0_ - k2 * phosph_PDE_cplx_506_0_ )
  // Same rates as PKA-phosph-I1
  phosph_PDE_505_0_Complex_formation_: PKA_active_503_0_ + cAMP_PDE_647_0_ -> phosph_PDE_cplx_506_0_; kinetics_464_0_*(phosph_PDE_505_0_Complex_formation__k1*PKA_active_503_0_*cAMP_PDE_647_0_ - phosph_PDE_505_0_Complex_formation__k2*phosph_PDE_cplx_506_0_);
    phosph_PDE_505_0_Complex_formation__k1 = 33088.21 litre_per_mmole_per_second; phosph_PDE_505_0_Complex_formation__k2 = 10.8 per_second;
  // kinetics_464_0_ * k3*phosph_PDE_cplx_506_0_
  phosph_PDE_505_0_Product_formation_: phosph_PDE_cplx_506_0_ => cAMP_PDEp_642_0_ + PKA_active_503_0_; kinetics_464_0_*phosph_PDE_505_0_Product_formation__k3*phosph_PDE_cplx_506_0_;
    phosph_PDE_505_0_Product_formation__k3 = 2.7 per_second;
  // kinetics_464_0_ * ( kcat * ATP_544_0_ * AC1_CaM_546_0_/(Km + ATP_544_0_))
  AC1CaM_form_cAMP_548_0_: $ATP_544_0_ -> cAMP_542_0_; kinetics_464_0_*(AC1CaM_form_cAMP_548_0__kcat*ATP_544_0_*AC1_CaM_546_0_/(AC1CaM_form_cAMP_548_0__Km + ATP_544_0_));  // modifiers: AC1_CaM_546_0_
    AC1CaM_form_cAMP_548_0__Km = 0.02000025 mmole_per_litre; AC1CaM_form_cAMP_548_0__kcat = 18 per_second;
  // kinetics_464_0_ * ( kcat * ATP_544_0_ * AC2p_552_0_/(Km + ATP_544_0_))
  // Reduced Km to match expt data for basal activation of AC2 by PKC. Now k1 = 2.9e-6, k2 = 72, k3 = 18
  AC2p_form_cAMP_554_0_: $ATP_544_0_ -> cAMP_542_0_; kinetics_464_0_*(AC2p_form_cAMP_554_0__kcat*ATP_544_0_*AC2p_552_0_/(AC2p_form_cAMP_554_0__Km + ATP_544_0_));  // modifiers: AC2p_552_0_
    AC2p_form_cAMP_554_0__Km = 0.02011493 mmole_per_litre; AC2p_form_cAMP_554_0__kcat = 7 per_second;
  // kinetics_464_0_ * ( kcat * ATP_544_0_ * AC2_Gs_556_0_/(Km + ATP_544_0_))
  AC2Gs_form_cAMP_558_0_: $ATP_544_0_ -> cAMP_542_0_; kinetics_464_0_*(AC2Gs_form_cAMP_558_0__kcat*ATP_544_0_*AC2_Gs_556_0_/(AC2Gs_form_cAMP_558_0__Km + ATP_544_0_));  // modifiers: AC2_Gs_556_0_
    AC2Gs_form_cAMP_558_0__Km = 0.02000025 mmole_per_litre; AC2Gs_form_cAMP_558_0__kcat = 18 per_second;
  // kinetics_464_0_ * ( kcat * ATP_544_0_ * AC1_Gs_562_0_/(Km + ATP_544_0_))
  AC1Gs_form_cAMP_564_0_: $ATP_544_0_ -> cAMP_542_0_; kinetics_464_0_*(AC1Gs_form_cAMP_564_0__kcat*ATP_544_0_*AC1_Gs_562_0_/(AC1Gs_form_cAMP_564_0__Km + ATP_544_0_));  // modifiers: AC1_Gs_562_0_
    AC1Gs_form_cAMP_564_0__Km = 0.02000025 mmole_per_litre; AC1Gs_form_cAMP_564_0__kcat = 18 per_second;
  // kinetics_464_0_ * ( kcat * ATP_544_0_ * AC2p_Gs_566_0_/(Km + ATP_544_0_))
  AC2pGs_form_cAMP_568_0_: $ATP_544_0_ -> cAMP_542_0_; kinetics_464_0_*(AC2pGs_form_cAMP_568_0__kcat*ATP_544_0_*AC2p_Gs_566_0_/(AC2pGs_form_cAMP_568_0__Km + ATP_544_0_));  // modifiers: AC2p_Gs_566_0_
    AC2pGs_form_cAMP_568_0__Km = 0.06000076 mmole_per_litre; AC2pGs_form_cAMP_568_0__kcat = 54 per_second;
  // kinetics_464_0_ * ( k1 * PDE1_632_0_*cAMP_542_0_ - k2 * PDE1_cplx_635_0_ )
  // Rate is 1/6 of the CaM stim form. We'll just reduce all lf k1, k2, k3 so that the Vmax goes down 1/6.
  PDE1_634_0_Complex_formation_: PDE1_632_0_ + cAMP_542_0_ -> PDE1_cplx_635_0_; kinetics_464_0_*(PDE1_634_0_Complex_formation__k1*PDE1_632_0_*cAMP_542_0_ - PDE1_634_0_Complex_formation__k2*PDE1_cplx_635_0_);
    PDE1_634_0_Complex_formation__k1 = 341.8285 litre_per_mmole_per_second; PDE1_634_0_Complex_formation__k2 = 6.67 per_second;
  // kinetics_464_0_ * k3*PDE1_cplx_635_0_
  PDE1_634_0_Product_formation_: PDE1_cplx_635_0_ => AMP_570_0_ + PDE1_632_0_; kinetics_464_0_*PDE1_634_0_Product_formation__k3*PDE1_cplx_635_0_;
    PDE1_634_0_Product_formation__k3 = 1.667 per_second;
  // kinetics_464_0_ * ( k1 * CaM_PDE1_637_0_*cAMP_542_0_ - k2 * CaM_PDE1_cplx_640_0_ )
  // Max activity ~10umol/min/mg in presence of lots of CaM. Affinity is low, 40 uM. k3 = 10, k2 = 40, k1 = (50/40) / 6e5.
  CaM_PDE1_639_0_Complex_formation_: CaM_PDE1_637_0_ + cAMP_542_0_ -> CaM_PDE1_cplx_640_0_; kinetics_464_0_*(CaM_PDE1_639_0_Complex_formation__k1*CaM_PDE1_637_0_*cAMP_542_0_ - CaM_PDE1_639_0_Complex_formation__k2*CaM_PDE1_cplx_640_0_);
    CaM_PDE1_639_0_Complex_formation__k1 = 1010.774 litre_per_mmole_per_second; CaM_PDE1_639_0_Complex_formation__k2 = 28 per_second;
  // kinetics_464_0_ * k3*CaM_PDE1_cplx_640_0_
  CaM_PDE1_639_0_Product_formation_: CaM_PDE1_cplx_640_0_ => AMP_570_0_ + CaM_PDE1_637_0_; kinetics_464_0_*CaM_PDE1_639_0_Product_formation__k3*CaM_PDE1_cplx_640_0_;
    CaM_PDE1_639_0_Product_formation__k3 = 7 per_second;
  // kinetics_464_0_ * ( k1 * cAMP_PDEp_642_0_*cAMP_542_0_ - k2 * ePDE_p_cplx_645_0_ )
  // This form has about twice the activity of the unphosphorylated form. See Sette et al JBC 269:28 18271-18274 1994. We'll ignore cGMP effects for now.
  ePDE_p_644_0_Complex_formation_: cAMP_PDEp_642_0_ + cAMP_542_0_ -> ePDE_p_cplx_645_0_; kinetics_464_0_*(ePDE_p_644_0_Complex_formation__k1*cAMP_PDEp_642_0_*cAMP_542_0_ - ePDE_p_644_0_Complex_formation__k2*ePDE_p_cplx_645_0_);
    ePDE_p_644_0_Complex_formation__k1 = 48295.25 litre_per_mmole_per_second; ePDE_p_644_0_Complex_formation__k2 = 80 per_second;
  // kinetics_464_0_ * k3*ePDE_p_cplx_645_0_
  ePDE_p_644_0_Product_formation_: ePDE_p_cplx_645_0_ => AMP_570_0_ + cAMP_PDEp_642_0_; kinetics_464_0_*ePDE_p_644_0_Product_formation__k3*ePDE_p_cplx_645_0_;
    ePDE_p_644_0_Product_formation__k3 = 20 per_second;
  // kinetics_464_0_ * ( k1 * cAMP_PDE_647_0_*cAMP_542_0_ - k2 * ePDE_cplx_650_0_ )
  // Best rates are from Conti et al Biochem 34 7979-7987 1995. Though these are for the Sertoli cell form, it looks like they carry nicely into alternatively spliced brain form. See Sette et al JBC 269:28 18271-18274 Km ~2 uM, Vmax est ~ 10 umol/min/mg for pure form. Brain protein is 93 kD but this was 67. So k3 ~10, k2 ~40, k1 ~4.2e-6
  ePDE_649_0_Complex_formation_: cAMP_PDE_647_0_ + cAMP_542_0_ -> ePDE_cplx_650_0_; kinetics_464_0_*(ePDE_649_0_Complex_formation__k1*cAMP_PDE_647_0_*cAMP_542_0_ - ePDE_649_0_Complex_formation__k2*ePDE_cplx_650_0_);
    ePDE_649_0_Complex_formation__k1 = 20843.61 litre_per_mmole_per_second; ePDE_649_0_Complex_formation__k2 = 40 per_second;
  // kinetics_464_0_ * k3*ePDE_cplx_650_0_
  ePDE_649_0_Product_formation_: ePDE_cplx_650_0_ => AMP_570_0_ + cAMP_PDE_647_0_; kinetics_464_0_*ePDE_649_0_Product_formation__k3*ePDE_cplx_650_0_;
    ePDE_649_0_Product_formation__k3 = 10 per_second;

  // Unit definitions:
  unit volume = litre;
  unit substance = 1e-3 mole;
  unit length = metre;
  unit area = metre^2;
  unit time = second;
  unit litre_per_mmole_per_second = litre / (1e-3 mole * second);
  unit per_second = 1 / second;
  unit mmole_per_litre = 1e-3 mole / litre;
end
